# OpenSim document version 40500
AnalyzeTool opensenseIMUDataReporter:
  model_file: ./DebugModel\FullBodyModel_Hamner2010_v2_0_mvp_IMU_3DOFknee_scaled.osim
  replace_force_set: false
  results_directory: ./DebugResults
  output_precision: 8
  initial_time: 0
  final_time: 9.983
  solve_for_equilibrium_for_auxiliary_states: false
  maximum_number_of_integrator_steps: 20000
  maximum_integrator_step_size: 1
  minimum_integrator_step_size: 1e-8
  integrator_error_tolerance: 1e-5
  coordinates_file: debugData.sto
  lowpass_cutoff_frequency_for_coordinates: -1
  AnalysisSet Analyses:
    IMUDataReporter: report_orientations=true report_gyroscope_signals=true report_accelerometer_signals=true
        compute_accelerations_without_forces=true start_time=0 end_time=9.983 step_interval=1 in_degrees=true
