# OpenSim document version 40500
ScaleTool virtual_subject_1:
  mass: 79.3787 [kg]
  height: 170
  age: 25
  notes: This is an template model scaling file.
  GenericModelMaker:
    model_file: C:\Users\Varun\Documents\Github\Synthetic-IMU\BaseModels\RajagopalModel.osim
  ModelScaler Generic Scaler:
    apply: true
    scaling_order: manualScale
    output_model_file: ../tmp/VirtualSubjectModels/virtual_subject_1.osim
    output_scale_file: ../tmp/VirtualSubjectScaleSets/virtual_subject_1.xml
    ScaleSet:
      Scale [values shared by the 22 below unless stated]: scales=(1.082087 1.082087 1.082087) apply=true
      Scale pelvis_scaler: segment=pelvis
      Scale femur_r_scaler: segment=femur_r
      Scale tibia_r_scaler: segment=tibia_r
      Scale patella_r_scaler: segment=patella_r
      Scale talus_r_scaler: segment=talus_r
      Scale calcn_r_scaler: segment=calcn_r
      Scale toes_r_scaler: segment=toes_r
      Scale femur_l_scaler: segment=femur_l
      Scale tibia_l_scaler: segment=tibia_l
      Scale patella_l_scaler: segment=patella_l
      Scale talus_l_scaler: segment=talus_l
      Scale calcn_l_scaler: segment=calcn_l
      Scale toes_l_scaler: segment=toes_l
      Scale torso_scaler: segment=torso
      Scale humerus_r_scaler: segment=humerus_r
      Scale ulna_r_scaler: segment=ulna_r
      Scale radius_r_scaler: segment=radius_r
      Scale hand_r_scaler: segment=hand_r
      Scale humerus_l_scaler: segment=humerus_l
      Scale ulna_l_scaler: segment=ulna_l
      Scale radius_l_scaler: segment=radius_l
      Scale hand_l_scaler: segment=hand_l
