# OpenSim document version 20302
ScaleTool subject01:
  mass: 79.3787 [kg]
  height: 170
  age: 25
  notes: This is an template model scaling file.
  GenericModelMaker:
    model_file: Rajagopal2015_opensense_calibrated.osim
  ModelScaler Generic Scaler:
    output_model_file: subject01_scaled.osim
    output_scale_file: subject01_scaleSet.xml
